*Heading
** Job name: test_potato Model name: Model-1
** Generated by: Abaqus/CAE 2024
*Preprint, echo=NO, model=NO, history=NO, contact=NO
**
** PARTS
**
*Part, name=potato
*Node
      1,   35.1830788,  -5.03233385
      2,   46.7033043,  -5.03233385
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*Element, type=CPE4
 1, 78, 80, 14, 15
 2, 79, 78, 15, 16
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*Nset, nset=b_leftBottom
  4,  9, 61, 62, 63, 64, 65, 66, 67, 68, 69, 70
*Elset, elset=b_leftBottom
 100, 104, 105, 106, 107, 108, 111, 112, 117, 123, 125
*Nset, nset=b_rightBottom
  2,  8, 54, 55, 56, 57
*Elset, elset=b_rightBottom
 90, 93, 97, 98, 99
*Nset, nset=b_top
  3,  6, 45, 46, 47, 48, 49, 50, 51
*Elset, elset=b_top
 61, 64, 65, 66, 75, 77, 78, 81
*Nset, nset=all, generate
   1,  190,    1
*Elset, elset=all, generate
   1,  165,    1
*Elset, elset=_s_top_S1, internal
 61, 66, 75, 77, 81
*Elset, elset=_s_top_S3, internal
 64, 65, 78
*Surface, type=ELEMENT, name=s_top
_s_top_S1, S1
_s_top_S3, S3
*Elset, elset=_s_wholeBoundary_S3, internal
   1,   2,   3,   9,  12,  17
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*Elset, elset=_s_wholeBoundary_S4, internal
  10,  97, 100, 104, 105, 106, 107, 111, 117, 125
*Elset, elset=_s_wholeBoundary_S1, internal
  22,  23,  61,  66,  75,  77,  81,  98, 147
*Elset, elset=_s_wholeBoundary_S2, internal
  90,  93,  99, 108, 112, 123, 148, 149, 157, 161
*Surface, type=ELEMENT, name=s_wholeBoundary
_s_wholeBoundary_S3, S3
_s_wholeBoundary_S4, S4
_s_wholeBoundary_S2, S2
_s_wholeBoundary_S1, S1
** Section: homogeneous
*Solid Section, elset=all, material=material
1.,
*End Part
**
**
** ASSEMBLY
**
*Assembly, name=Assembly
**
*Instance, name=potato-1, part=potato
*End Instance
**
*End Assembly
**
** MATERIALS
**
*Material, name=material
*Elastic
210000., 0.3
